// SBML level 2 version 4

function Rate_Law_for_Protein_misfolding(temp, P)
  (1 - 0.4/exponentiale^(temp - 37))*1e-5*1.4^(temp - 37)*P;
end

model Heat_Shock_Response()

  // Compartments:
  compartment Cell = 1;

  // Species:
  species HSF in Cell = 0.66919;
  species HSF_dimer in Cell = 0.000873084;
  species HSF_trimer in Cell = 0.000123719;
  species HSE in Cell = 29.733;
  species HSF_trimer_HSE in Cell = 2.95647; HSF_trimer_HSE is "HSF trimer:HSE";
  species HSP in Cell = 766.875;
  species HSP_HSF in Cell = 1403.13; HSP_HSF is "HSP:HSF";
  species MFP in Cell = 517.352;
  species HSP_MFP in Cell = 71.6475; HSP_MFP is "HSP:MFP";
  species Protein in Cell = 114915000;
  species A:B in Cell = 114915000; A:B is "Protein";
  species A:B in Cell = 114915000;
  species A:C in Cell = 114915000;
  species C in Cell = 114915000;
  species B in Cell = 114915000;

  // Parameters:
  temperature = 42;
  var Total_HSP;
  small_pop_binary = 0.0594354;
  small_pop_unary = 0.00165143;
  var Total_MFP;
  k1 = 3.49091; k1 is "k1+";
  k1_0 = 0.1895392; k1_0 is "k1-";
  k2 = 1.065179; k2 is "k2+";
  k2_0 = 1e-9; k2_0 is "k2-";
  k3 = 0.1690437; k3 is "k3+";
  k3_0 = 1.212085e-6; k3_0 is "k3-";
  k4 = 0.00830045;
  k5 = 3.562225; k5 is "k5-";
  k5_0 = 9.736653; k5_0 is "k5+";
  k6 = 2.333662;
  k7 = 4.309236e-5;
  k8 = 2.72689e-7;
  k9 = 3.2e-5;
  k11 = 0.00331898; k11 is "k11+";
  k11_0 = 4.43952; k11_0 is "k11-";
  k12 = 13.9392;
  temperature_37 = 37;

  // Assignment rules:
  Total_HSP := HSP*Cell + HSP_HSF*Cell + HSP_MFP*Cell;
  Total_MFP := MFP*Cell + HSP_MFP*Cell;

  // Reactions:
  HSF_trimer_DNA_binding__forward: HSF_trimer + HSE => HSF_trimer_HSE; Cell*k3*HSF_trimer*HSE; HSF_trimer_DNA_binding__forward is "HSF trimer DNA binding (forward)";
  Transcription___translation_of_HSP: HSF_trimer_HSE => HSP + HSF_trimer_HSE; Cell*k4*HSF_trimer_HSE; Transcription___translation_of_HSP is "Transcription & translation of HSP";
  HSF_trimer_unbinding: HSP + HSF_trimer_HSE => HSP_HSF + HSE + 2 HSF; Cell*k8*HSP*HSF_trimer_HSE;
  HSF_dimer_dissipation: HSP + HSF_dimer => HSP_HSF + HSF; Cell*k6*HSP*HSF_dimer;
  HSF_trimer_dissipation: HSP + HSF_trimer => HSP_HSF + 2 HSF; Cell*k7*HSP*HSF_trimer;
  Protein_refolding: HSP_MFP => HSP + Protein; Cell*k12*HSP_MFP;
  HSP_degradation: HSP => ; Cell*k9*HSP;
  Protein_misfolding: Protein => MFP; Cell*Rate_Law_for_Protein_misfolding(temperature, Protein);
  HSF_dimer_formation__forward: 2 HSF => HSF_dimer; Cell*k1*HSF^2; HSF_dimer_formation__forward is "HSF dimer formation (forward)";
  HSF_dimer_formation__backward: HSF_dimer => 2 HSF; Cell*k1_0*HSF_dimer; HSF_dimer_formation__backward is "HSF dimer formation (backward)";
  HSF_trimer_formation__forward: HSF + HSF_dimer => HSF_trimer; Cell*k2*HSF*HSF_dimer; HSF_trimer_formation__forward is "HSF trimer formation (forward)";
  HSF_trimer_formation__backward: HSF_trimer => HSF + HSF_dimer; Cell*k2_0*HSF_trimer; HSF_trimer_formation__backward is "HSF trimer formation (backward)";
  HSF_sequestration__forward: 2 HSP + 3 HSF => HSP_HSF; Cell*k5_0*HSP*HSF; HSF_sequestration__forward is "HSF sequestration (forward)";
  HSF_sequestration__backward: HSP_HSF => HSP + HSF; Cell*k5*HSP_HSF; HSF_sequestration__backward is "HSF sequestration (backward)";
  HSF_sequestration__backward: A_B + C => A_C + B; Cell*k5*HSP_HSF; HSF_sequestration__backward is "HSF sequestration (backward)";
  MFP_sequestration__forward: HSP + MFP => HSP_MFP; Cell*k11*HSP*MFP; MFP_sequestration__forward is "MFP sequestration (forward)";
  MFP_sequestration__backward: HSP_MFP => HSP + MFP; Cell*k11_0*HSP_MFP; MFP_sequestration__backward is "MFP sequestration (backward)";
  HSF_trimer_DNA_binding__backward: HSF_trimer_HSE => HSF_trimer + HSE; Cell*k3_0*HSF_trimer_HSE; HSF_trimer_DNA_binding__backward is "HSF trimer DNA binding (backward)";

  // Unit definitions:
  unit volume = 1e-3 litre;
  unit substance = item;
end
